/PREP7
/UNITS,MPa
!    KEYPOINT CREATION
!Reinforcement Plate
K,1,0,0,0
K,2,100.0,0,0
K,3,100.0,50.0,0
K,4,0,50.0,0
K,5,0,0,4.0
K,6,100.0,0,4.0
K,7,100.0,50.0,4.0
K,8,0,50.0,4.0
!    FINISH KEYPOINT CREATION
 !   LINE CREATION
 !Reinforcement Plate
L,1,2
L,2,3
L,3,4
L,4,1
L,5,6
L,6,7
L,7,8
L,8,5
L,1,5
L,2,6
L,3,7
L,4,8
!    FINISH LINE CREATION
v,1,2,3,4,5,6,7,8
ET,1,SOLID279
ESIZE,2.0
SAVE, SaveFile.db
